<?xml version="1.0" ?>
<Lems xmlns="http://www.neuroml.org/lems/0.7.3" xmlns:xsi="http://www.w3.org/2001/XMLSchema-instance" xsi:schemaLocation="http://www.neuroml.org/lems/0.7.3 https://raw.githubusercontent.com/LEMS/LEMS/development/Schemas/LEMS/LEMS_v0.7.3.xsd">
  <Dimension name="time" t="1"/>
  <ComponentType name="g2do">
    <Parameter dimension="none" name="a"/>
    <Parameter dimension="none" name="tau"/>
    <Parameter dimension="none" name="c"/>
    <Parameter dimension="none" name="b"/>
    <Parameter dimension="none" name="e"/>
    <Parameter dimension="none" name="d"/>
    <Parameter dimension="none" name="g"/>
    <Parameter dimension="none" name="f"/>
    <Parameter dimension="none" name="I"/>
    <Parameter dimension="none" name="beta"/>
    <Parameter dimension="none" name="alpha"/>
    <Parameter dimension="none" name="gamma"/>
    <Exposure dimension="none" name="W"/>
    <Exposure dimension="none" name="V"/>
    <Dynamics>
      <StateVariable dimension="none" exposure="W" name="W"/>
      <StateVariable dimension="none" exposure="V" name="V"/>
      <TimeDerivative value="d * tau * (alpha*W - f*V^3 + e*V^2 + g*V + gamma*I + gamma*c_0)" variable="W"/>
      <TimeDerivative value="d * (a + b*V + c*V^2 - beta*W) / tau" variable="V"/>
    </Dynamics>
  </ComponentType>
</Lems>
